<neuroml xmlns="http://www.neuroml.org/schema/neuroml2"  xmlns:xs="http://www.w3.org/2001/XMLSchema" xmlns:xsi="http://www.w3.org/2001/XMLSchema-instance" xsi:schemaLocation="http://www.neuroml.org/schema/neuroml2 https://raw.github.com/NeuroML/NeuroML2/development/Schemas/NeuroML2/NeuroML_v2.3.xsd" id="Net_AA1506">
    <include href="AA1506.cell.nml"/>
    <network id="Net_AA1506">
        <population id="pop_AA1506" component="AA1506" type="populationList">
            <instance id="0">
                <location x="0." y="0." z="0."/>
            </instance>
        </population>
    </network>
</neuroml>
