<neuroml xmlns="http://www.neuroml.org/schema/neuroml2"  xmlns:xs="http://www.w3.org/2001/XMLSchema" xmlns:xsi="http://www.w3.org/2001/XMLSchema-instance" xsi:schemaLocation="http://www.neuroml.org/schema/neuroml2 https://raw.github.com/NeuroML/NeuroML2/development/Schemas/NeuroML2/NeuroML_v2.3.xsd" id="AA0173">
    <include href="pas.channel.nml"/>
    <include href="na.channel.nml"/>
    <include href="kv.channel.nml"/>
    <cell id="AA0173">
        <notes>
    Cell AA0173 downloaded from Janelia MouseLight project (https://www.janelia.org/project-team/mouselight)
    and converted to NeuroML
    DOI of original cell: https://doi.org/10.25378/janelia.5527420

    NOTE: cells have been given a soma of diameter 20um for visualisation purposes
    However, no soma has been reconstructed from the original cells</notes>
        <property tag="JaneliaMouseLight:idString" value="AA0173"/>
        <property tag="JaneliaMouseLight:DOI" value="10.25378/janelia.5527420"/>
        <property tag="JaneliaMouseLight:sample_date" value="2017-04-19T21:51:49.000Z"/>
        <property tag="JaneliaMouseLight:sample_strain" value="C57BL/6J"/>
        <property tag="JaneliaMouseLight:label_virus" value="AAV2/1.FLEX-eGFP"/>
        <property tag="JaneliaMouseLight:label_fluorophore" value="eGFP"/>
        <morphology id="morph_AA0173">
            <segment id="0" name="soma">
                <proximal x="8247.75320450001" y="3455.70206975" z="9359.738535625" diameter="20.0"/>
                <distal x="8247.75320450001" y="3455.70206975" z="9359.738535625" diameter="20.0"/>
            </segment>
            <segment id="1001" name="axon_1001">
                <parent segment="0"/>
                <proximal x="8247.75320450001" y="3455.70206975" z="9359.738535625" diameter="2.0"/>
                <distal x="8247.75320450001" y="3455.70206975" z="9359.738535625" diameter="2.0"/>
            </segment>
            <segment id="1002" name="axon_1002">
                <parent segment="1001"/>
                <distal x="8247.39580150001" y="3454.39256875" z="9360.070590625" diameter="2.0"/>
            </segment>
            <segment id="1003" name="axon_1003">
                <parent segment="1002"/>
                <distal x="8251.245987" y="3460.0286025" z="9360.070590625" diameter="2.0"/>
            </segment>
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            <segmentGroup id="axon_group" neuroLexId="GO:0030424">
                <member segment="1001"/>
                <member segment="1002"/>
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            </segmentGroup>
            <segmentGroup id="soma_group" neuroLexId="GO:0043025">
                <member segment="0"/>
            </segmentGroup>
            <segmentGroup id="dendrite_group" neuroLexId="GO:0030425">
                <member segment="1000001"/>
                <member segment="1000002"/>
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            </segmentGroup>
        </morphology>
        <biophysicalProperties id="biophys">
            <membraneProperties>
                <channelDensity id="pas_chan" ionChannel="pas" condDensity="0.000142857 S_per_cm2" erev="-70.0 mV" ion="non_specific"/>
                <channelDensity id="na_chan" ionChannel="na" condDensity="0.1 S_per_cm2" erev="60.0 mV" ion="na"/>
                <channelDensity id="kv_chan" ionChannel="kv" condDensity="0.01 S_per_cm2" erev="-90.0 mV" ion="k"/>
                <specificCapacitance value="1.0 uF_per_cm2"/>
                <initMembPotential value="-80 mV"/>
            </membraneProperties>
            <intracellularProperties>
                <resistivity value="100 ohm_cm"/>
            </intracellularProperties>
        </biophysicalProperties>
    </cell>
</neuroml>
