<neuroml xmlns="http://www.neuroml.org/schema/neuroml2"  xmlns:xs="http://www.w3.org/2001/XMLSchema" xmlns:xsi="http://www.w3.org/2001/XMLSchema-instance" xsi:schemaLocation="http://www.neuroml.org/schema/neuroml2 https://raw.github.com/NeuroML/NeuroML2/development/Schemas/NeuroML2/NeuroML_v2.3.xsd" id="AA1506">
    <include href="pas.channel.nml"/>
    <include href="na.channel.nml"/>
    <include href="kv.channel.nml"/>
    <cell id="AA1506">
        <notes>
    Cell AA1506 downloaded from Janelia MouseLight project (https://www.janelia.org/project-team/mouselight)
    and converted to NeuroML
    DOI of original cell: https://doi.org/n/a

    NOTE: cells have been given a soma of diameter 20um for visualisation purposes
    However, no soma has been reconstructed from the original cells</notes>
        <property tag="JaneliaMouseLight:idString" value="AA1506"/>
        <property tag="JaneliaMouseLight:DOI" value="n/a"/>
        <property tag="JaneliaMouseLight:sample_date" value="2020-01-13T05:00:00.000Z"/>
        <property tag="JaneliaMouseLight:sample_strain" value="Sim1-Cre"/>
        <property tag="JaneliaMouseLight:label_virus" value="syn-FLEX-TRE-2tTA;TREx7-tdTomato"/>
        <property tag="JaneliaMouseLight:label_fluorophore" value="tdTomato, AF546"/>
        <morphology id="morph_AA1506">
            <segment id="0" name="soma">
                <proximal x="4498.391025" y="1558.128044875" z="7445.04621775" diameter="20.0"/>
                <distal x="4498.391025" y="1558.128044875" z="7445.04621775" diameter="20.0"/>
            </segment>
            <segment id="1001" name="axon_1001">
                <parent segment="0"/>
                <proximal x="4498.391025" y="1558.128044875" z="7445.04621775" diameter="2.0"/>
                <distal x="4498.391025" y="1558.128044875" z="7445.04621775" diameter="2.0"/>
            </segment>
            <segment id="1002" name="axon_1002">
                <parent segment="1001"/>
                <distal x="4498.50761700001" y="1554.5419478125" z="7446.1014965" diameter="2.0"/>
            </segment>
            <segment id="1003" name="axon_1003">
                <parent segment="1002"/>
                <distal x="4518.00775" y="1550.279581875" z="7474.519979375" diameter="2.0"/>
            </segment>
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            <segmentGroup id="axon_group" neuroLexId="GO:0030424">
                <member segment="1001"/>
                <member segment="1002"/>
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            </segmentGroup>
            <segmentGroup id="soma_group" neuroLexId="GO:0043025">
                <member segment="0"/>
            </segmentGroup>
            <segmentGroup id="dendrite_group" neuroLexId="GO:0030425">
                <member segment="1000001"/>
                <member segment="1000002"/>
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            </segmentGroup>
        </morphology>
        <biophysicalProperties id="biophys">
            <membraneProperties>
                <channelDensity id="pas_chan" ionChannel="pas" condDensity="0.000142857 S_per_cm2" erev="-70.0 mV" ion="non_specific"/>
                <channelDensity id="na_chan" ionChannel="na" condDensity="0.1 S_per_cm2" erev="60.0 mV" ion="na"/>
                <channelDensity id="kv_chan" ionChannel="kv" condDensity="0.01 S_per_cm2" erev="-90.0 mV" ion="k"/>
                <specificCapacitance value="1.0 uF_per_cm2"/>
                <initMembPotential value="-80 mV"/>
            </membraneProperties>
            <intracellularProperties>
                <resistivity value="100 ohm_cm"/>
            </intracellularProperties>
        </biophysicalProperties>
    </cell>
</neuroml>
