<Lems>

    <!--

        This LEMS file has been automatically generated using PyNeuroML v0.3.14 (libNeuroML v0.2.45)

     -->

    <!-- Specify which component to run -->
    <Target component="Test_AA0173"/>

    <!-- Include core NeuroML2 ComponentType definitions -->
    <Include file="Cells.xml"/>
    <Include file="Networks.xml"/>
    <Include file="Simulation.xml"/>

    <Include file="Net_AA0173.net.nml"/>
    <Include file="AA0173_active.cell.nml"/>
    <Include file="pas.channel.nml"/>
    <Include file="na.channel.nml"/>
    <Include file="kv.channel.nml"/>

    <Simulation id="Test_AA0173" length="400ms" step="0.025ms" target="Net_AA0173" seed="12345">  <!-- Note seed: ensures same random numbers used every run -->

        <Display id="Some_voltages" title="Plots of Some_voltages" timeScale="1ms" xmin="-40.0" xmax="440.0" ymin="-80" ymax="40">
            <Line id="Pop_AA0173_0_AA0173_0_v" quantity="Pop_AA0173/0/AA0173/0/v" scale="1mV" color="#6aa799" timeScale="1ms"/>
            <Line id="Pop_AA0173_0_AA0173_1099_v" quantity="Pop_AA0173/0/AA0173/1099/v" scale="1mV" color="#029a72" timeScale="1ms"/>
            <Line id="Pop_AA0173_0_AA0173_1199_v" quantity="Pop_AA0173/0/AA0173/1199/v" scale="1mV" color="#d340bb" timeScale="1ms"/>
            <Line id="Pop_AA0173_0_AA0173_1299_v" quantity="Pop_AA0173/0/AA0173/1299/v" scale="1mV" color="#4c73a9" timeScale="1ms"/>
            <Line id="Pop_AA0173_0_AA0173_1399_v" quantity="Pop_AA0173/0/AA0173/1399/v" scale="1mV" color="#5e503a" timeScale="1ms"/>
            <Line id="Pop_AA0173_0_AA0173_1499_v" quantity="Pop_AA0173/0/AA0173/1499/v" scale="1mV" color="#3193ca" timeScale="1ms"/>
            <Line id="Pop_AA0173_0_AA0173_1000099_v" quantity="Pop_AA0173/0/AA0173/1000099/v" scale="1mV" color="#90e5e9" timeScale="1ms"/>
            <Line id="Pop_AA0173_0_AA0173_1000199_v" quantity="Pop_AA0173/0/AA0173/1000199/v" scale="1mV" color="#29645f" timeScale="1ms"/>
        </Display>

        <OutputFile id="AA0173_voltages_dat" fileName="AA0173_voltages.dat">
            <OutputColumn id="Pop_AA0173_0_AA0173_0_v" quantity="Pop_AA0173/0/AA0173/0/v"/>
            <OutputColumn id="Pop_AA0173_0_AA0173_1099_v" quantity="Pop_AA0173/0/AA0173/1099/v"/>
            <OutputColumn id="Pop_AA0173_0_AA0173_1199_v" quantity="Pop_AA0173/0/AA0173/1199/v"/>
            <OutputColumn id="Pop_AA0173_0_AA0173_1299_v" quantity="Pop_AA0173/0/AA0173/1299/v"/>
            <OutputColumn id="Pop_AA0173_0_AA0173_1399_v" quantity="Pop_AA0173/0/AA0173/1399/v"/>
            <OutputColumn id="Pop_AA0173_0_AA0173_1499_v" quantity="Pop_AA0173/0/AA0173/1499/v"/>
            <OutputColumn id="Pop_AA0173_0_AA0173_1000099_v" quantity="Pop_AA0173/0/AA0173/1000099/v"/>
            <OutputColumn id="Pop_AA0173_0_AA0173_1000199_v" quantity="Pop_AA0173/0/AA0173/1000199/v"/>
        </OutputFile>

    </Simulation>

</Lems>
