<Lems>

    <!--

        This LEMS file has been automatically generated using PyNeuroML v0.7.2 (libNeuroML v0.4.1)

     -->

    <!-- Specify which component to run -->
    <Target component="Test_Net_AA0173"/>

    <!-- Include core NeuroML2 ComponentType definitions -->
    <Include file="Cells.xml"/>
    <Include file="Networks.xml"/>
    <Include file="Simulation.xml"/>

    <Include file="Net_AA0173.net.nml"/>
    <Include file="AA0173_active.cell.nml"/>
    <Include file="pas.channel.nml"/>
    <Include file="na.channel.nml"/>
    <Include file="kv.channel.nml"/>

    <Simulation id="Test_Net_AA0173" length="400ms" step="0.025ms" target="Net_AA0173" seed="12345">  <!-- Note seed: ensures same random numbers used every run -->

        <Display id="Some_voltages_AA0173" title="Plots of Some_voltages_AA0173" timeScale="1ms" xmin="-40.0" xmax="440.00000000000006" ymin="-80" ymax="40">
            <Line id="Pop_AA0173_0_AA0173_0_v" quantity="Pop_AA0173/0/AA0173/0/v" scale="1mV" color="#d54f33" timeScale="1ms"/>
            <Line id="Pop_AA0173_0_AA0173_1099_v" quantity="Pop_AA0173/0/AA0173/1099/v" scale="1mV" color="#0534e4" timeScale="1ms"/>
            <Line id="Pop_AA0173_0_AA0173_1199_v" quantity="Pop_AA0173/0/AA0173/1199/v" scale="1mV" color="#98e752" timeScale="1ms"/>
            <Line id="Pop_AA0173_0_AA0173_1299_v" quantity="Pop_AA0173/0/AA0173/1299/v" scale="1mV" color="#bca074" timeScale="1ms"/>
            <Line id="Pop_AA0173_0_AA0173_1399_v" quantity="Pop_AA0173/0/AA0173/1399/v" scale="1mV" color="#632794" timeScale="1ms"/>
            <Line id="Pop_AA0173_0_AA0173_1499_v" quantity="Pop_AA0173/0/AA0173/1499/v" scale="1mV" color="#8a5d88" timeScale="1ms"/>
            <Line id="Pop_AA0173_0_AA0173_1000099_v" quantity="Pop_AA0173/0/AA0173/1000099/v" scale="1mV" color="#df5954" timeScale="1ms"/>
            <Line id="Pop_AA0173_0_AA0173_1000199_v" quantity="Pop_AA0173/0/AA0173/1000199/v" scale="1mV" color="#52c8bf" timeScale="1ms"/>
        </Display>

        <OutputFile id="AA0173_voltages_dat" fileName="AA0173_voltages.dat">
            <OutputColumn id="Pop_AA0173_0_AA0173_0_v" quantity="Pop_AA0173/0/AA0173/0/v"/>
            <OutputColumn id="Pop_AA0173_0_AA0173_1099_v" quantity="Pop_AA0173/0/AA0173/1099/v"/>
            <OutputColumn id="Pop_AA0173_0_AA0173_1199_v" quantity="Pop_AA0173/0/AA0173/1199/v"/>
            <OutputColumn id="Pop_AA0173_0_AA0173_1299_v" quantity="Pop_AA0173/0/AA0173/1299/v"/>
            <OutputColumn id="Pop_AA0173_0_AA0173_1399_v" quantity="Pop_AA0173/0/AA0173/1399/v"/>
            <OutputColumn id="Pop_AA0173_0_AA0173_1499_v" quantity="Pop_AA0173/0/AA0173/1499/v"/>
            <OutputColumn id="Pop_AA0173_0_AA0173_1000099_v" quantity="Pop_AA0173/0/AA0173/1000099/v"/>
            <OutputColumn id="Pop_AA0173_0_AA0173_1000199_v" quantity="Pop_AA0173/0/AA0173/1000199/v"/>
        </OutputFile>

    </Simulation>

</Lems>
