<neuroml xmlns="http://www.neuroml.org/schema/neuroml2"  xmlns:xs="http://www.w3.org/2001/XMLSchema" xmlns:xsi="http://www.w3.org/2001/XMLSchema-instance" xsi:schemaLocation="http://www.neuroml.org/schema/neuroml2 https://raw.github.com/NeuroML/NeuroML2/development/Schemas/NeuroML2/NeuroML_v2beta5.xsd" id="Net_AA0173">
    <include href="AA0173_active.cell.nml"/>
    <pulseGenerator id="stim_AA0173" delay="20ms" duration="300ms" amplitude="350pA"/>
    <network id="Net_AA0173">
        <population id="Pop_AA0173" component="AA0173" type="populationList">
            <instance id="0">
                <location x="0." y="0." z="0."/>
            </instance>
        </population>
        <inputList id="stim_AA0173_input" population="Pop_AA0173" component="stim_AA0173">
            <input id="0" target="../Pop_AA0173/0/AA0173" destination="synapses"/>
        </inputList>
    </network>
</neuroml>
