<neuroml xmlns="http://www.neuroml.org/schema/neuroml2"  xmlns:xs="http://www.w3.org/2001/XMLSchema" xmlns:xsi="http://www.w3.org/2001/XMLSchema-instance" xsi:schemaLocation="http://www.neuroml.org/schema/neuroml2 https://raw.github.com/NeuroML/NeuroML2/development/Schemas/NeuroML2/NeuroML_v2beta5.xsd" id="Net_AA0289">
    <include href="AA0289_active.cell.nml"/>
    <pulseGenerator id="stim_AA0289" delay="20ms" duration="300ms" amplitude="600pA"/>
    <network id="Net_AA0289">
        <population id="Pop_AA0289" component="AA0289" type="populationList">
            <instance id="0">
                <location x="0." y="0." z="0."/>
            </instance>
        </population>
        <inputList id="stim_AA0289_input" population="Pop_AA0289" component="stim_AA0289">
            <input id="0" target="../Pop_AA0289/0/AA0289" destination="synapses"/>
        </inputList>
    </network>
</neuroml>
