<neuroml xmlns="http://www.neuroml.org/schema/neuroml2"  xmlns:xs="http://www.w3.org/2001/XMLSchema" xmlns:xsi="http://www.w3.org/2001/XMLSchema-instance" xsi:schemaLocation="http://www.neuroml.org/schema/neuroml2 https://raw.github.com/NeuroML/NeuroML2/development/Schemas/NeuroML2/NeuroML_v2.3.xsd" id="Net_AA1506">
    <include href="AA1506_active.cell.nml"/>
    <pulseGenerator id="stim_AA1506" delay="20ms" duration="300ms" amplitude="1000pA"/>
    <network id="Net_AA1506">
        <population id="Pop_AA1506" component="AA1506" type="populationList">
            <instance id="0">
                <location x="0." y="0." z="0."/>
            </instance>
        </population>
        <inputList id="stim_AA1506_input" population="Pop_AA1506" component="stim_AA1506">
            <input id="0" target="../Pop_AA1506/0/AA1506" destination="synapses"/>
        </inputList>
    </network>
</neuroml>
